Simulations: Version=122
  DataStore
  Replacements
    Report ReportWaterLayers: EventNames=[Clock].DoReport
      VariableNames:
        [Clock].Today
        [Soil].OutputLayers.SWmm
        [Soil].OutputLayers.SW
    Report ReportWaterBalance: EventNames=[Clock].DoReport
      VariableNames:
        [Clock].Today
        [Soil].WEIRDO.Drainage
        [Soil].WEIRDO.Infiltration
        [Soil].WEIRDO.Runoff
        [Soil].WEIRDO.Es
        [Soil].WEIRDO.WaterExtraction
        [Soil].WEIRDO.pond
        sum([Soil].WEIRDO.SWmm) as ProfileWater
    Report ReportCrop: EventNames=[Clock].DoReport
      VariableNames:
        [Clock].Today
        [Wheat].Leaf.CoverTotal
        [Wheat].Leaf.LAI
        [Wheat].Leaf.Height
        [Wheat].Root.LengthDensity
        [Wheat].Leaf.PotentialEP
        [Wheat].Root.Depth
    Report ReportMetVariables: EventNames=[Clock].DoReport
      VariableNames:
        [Clock].Today
        [IWeather].MaxT
        [IWeather].MinT
        [IWeather].Radn
        [IWeather].Rain
        [IWeather].VP
        [IWeather].Wind
        [Soil].WEIRDO.Eo
        [Soil].WEIRDO.Eos
  Experiment
    Factors
      Factor Repellency
        CompositeFactor High: Specifications=[WEIRDO]
          WEIRDO: PrecipitationInterception=0; Salb=0.15; Thickness=[1400]; DUL=[0.115, 0.114, 0.115, 0.12, 0.12, 0.15, 0.25, 0.25, 0.25]; SAT=[0.46, 0.44, 0.42, 0.42, 0.42, 0.41, 0.41, 0.41, 0.41]; CFlow=[0.763, 0.791, 1.26, 1.17, 1, 0.948, 1.2, 1.2, 1.2]; XFlow=[2.08, 2.08, 1.99, 2, 2.04, 2.07, 2.03, 2.03, 2.03]; PsiBub=[-10, -10, -10, -10, -10, -10, -10, -10, -10]; MinRepellancyFactor=[0, 0, 0, 0, 0, 0, 0, 0, 0]; LowerRepellentWC=[0.5, 0.5, 0.5, 0.5, 0.5, 0.5, 0.5, 0.5, 0.5]; UpperRepellentWC=[0.8, 0.8, 0.8, 0.8, 0.8, 0.8, 0.8, 0.8, 0.8]; XF=[1, 1, 1, 1, 1, 1, 1, 1, 1]; BD=[1.4, 1.45, 1.5, 1.5, 1.5, 1.5, 1.5, 1.5, 1.5]; SubProfileConductance=100; WaterTableDepth=10; CalculateInfiltration=true; CalculateDrainage=true; ReportDetail=false; IncludeSorption=true; CalculateEvaporation=false; CalculateDiffusion=false; DiffusivityMultiplier=1; ExtractionMultiplier=0; ProfileWaterExtraction=0; TotalCover=0; ResidueWater=0; Hour=0; ReportLayer=0; TimeStep=0
            LL15=[0.051, 0.051, 0.052, 0.058, 0.075, 0.085, 0.15, 0.15, 0.15]
        CompositeFactor Moderate: Specifications=[WEIRDO]
          WEIRDO: PrecipitationInterception=0; Salb=0.15; Thickness=[1400]; DUL=[0.115, 0.114, 0.115, 0.12, 0.12, 0.15, 0.25, 0.25, 0.25]; SAT=[0.46, 0.44, 0.42, 0.42, 0.42, 0.41, 0.41, 0.41, 0.41]; CFlow=[0.763, 0.791, 1.26, 1.17, 1, 0.948, 1.2, 1.2, 1.2]; XFlow=[2.08, 2.08, 1.99, 2, 2.04, 2.07, 2.03, 2.03, 2.03]; PsiBub=[-10, -10, -10, -10, -10, -10, -10, -10, -10]; MinRepellancyFactor=[0.1, 0.1, 0.1, 0.1, 0.1, 0.1, 0.1, 0.1, 0.1]; LowerRepellentWC=[0.5, 0.5, 0.5, 0.5, 0.5, 0.5, 0.5, 0.5, 0.5]; UpperRepellentWC=[0.8, 0.8, 0.8, 0.8, 0.8, 0.8, 0.8, 0.8, 0.8]; XF=[1, 1, 1, 1, 1, 1, 1, 1, 1]; BD=[1.4, 1.45, 1.5, 1.5, 1.5, 1.5, 1.5, 1.5, 1.5]; SubProfileConductance=100; WaterTableDepth=8; CalculateInfiltration=true; CalculateDrainage=true; ReportDetail=false; IncludeSorption=true; CalculateEvaporation=false; CalculateDiffusion=false; DiffusivityMultiplier=1; ExtractionMultiplier=0; ProfileWaterExtraction=0; TotalCover=0; ResidueWater=0; Hour=0; ReportLayer=0; TimeStep=0
            LL15=[0.051, 0.051, 0.052, 0.058, 0.075, 0.085, 0.15, 0.15, 0.15]
        CompositeFactor None: Specifications=[WEIRDO]
          WEIRDO: PrecipitationInterception=0; Salb=0.15; Thickness=[1400]; DUL=[0.115, 0.114, 0.115, 0.12, 0.12, 0.15, 0.25, 0.25, 0.25]; SAT=[0.46, 0.44, 0.42, 0.42, 0.42, 0.41, 0.41, 0.41, 0.41]; CFlow=[0.763, 0.791, 1.26, 1.17, 1, 0.948, 1.2, 1.2, 1.2]; XFlow=[2.08, 2.08, 1.99, 2, 2.04, 2.07, 2.03, 2.03, 2.03]; PsiBub=[-10, -10, -10, -10, -10, -10, -10, -10, -10]; MinRepellancyFactor=[1, 1, 1, 1, 1, 1, 1, 1, 1]; LowerRepellentWC=[0.5, 0.5, 0.5, 0.5, 0.5, 0.5, 0.5, 0.5, 0.5]; UpperRepellentWC=[0.8, 0.8, 0.8, 0.8, 0.8, 0.8, 0.8, 0.8, 0.8]; XF=[1, 1, 1, 1, 1, 1, 1, 1, 1]; BD=[1.4, 1.45, 1.5, 1.5, 1.5, 1.5, 1.5, 1.5, 1.5]; SubProfileConductance=100; WaterTableDepth=8; CalculateInfiltration=true; CalculateDrainage=true; ReportDetail=false; IncludeSorption=true; CalculateEvaporation=false; CalculateDiffusion=false; DiffusivityMultiplier=1; ExtractionMultiplier=0; ProfileWaterExtraction=0; TotalCover=0; ResidueWater=0; Hour=0; ReportLayer=0; TimeStep=0
            LL15=[0.051, 0.051, 0.052, 0.058, 0.075, 0.085, 0.15, 0.15, 0.15]
    Simulation Dalyup
      Clock: Start=1998-01-01; End=1998-12-31
      Summary SummaryFile
      Weather: FileName=Climate\Dalyup.met
      SoilArbitrator
      Zone Dalyup: Area=1; Slope=0; AspectAngle=0; Altitude=50
        Soil Deep sandy duplex 80-100cm (Gibson No455): SoilType=Sandy duplex; LocalName=Deep sandy duplexes; Site=Gibson; NearestTown=Gibson; Region=Southern Region; State=Western Australia; Country=Australia; ApsoilNumber=455; Latitude=-33.706011; Longitude=121.883874; LocationAccuracy=+/- 20m; YearOfSampling=2005
          DataSource=DAFWA David Hall and CSIRO Yvette Oliver. GRDC subsoil constraints project
          Comments=Deep sandy duplex - Sand over clay/impeding layer at 80-100cm; Root to 1 m only, Bl_R4- evidence of waterlogging in photo at pizeometers, adjusted DUL due to waterlogging.
          WEIRDO: PrecipitationInterception=0; Salb=0.15; DUL=[0.115, 0.114, 0.115, 0.12, 0.12, 0.15, 0.25, 0.25, 0.25]; SAT=[0.46, 0.44, 0.42, 0.42, 0.42, 0.41, 0.41, 0.41, 0.41]; CFlow=[0.763, 0.791, 1.26, 1.17, 1, 0.948, 1.2, 1.2, 1.2]; XFlow=[2.08, 2.08, 1.99, 2, 2.04, 2.07, 2.03, 2.03, 2.03]; PsiBub=[-10, -10, -10, -10, -10, -10, -10, -10, -10]; MinRepellancyFactor=[0, 0, 1, 1, 1, 1, 1, 1, 1]; LowerRepellentWC=[0.5, 0.5, 0.5, 0.5, 0.5, 0.5, 0.5, 0.5, 0.5]; UpperRepellentWC=[0.8, 0.8, 0.8, 0.8, 0.8, 0.8, 0.8, 0.8, 0.8]; XF=[1, 1, 1, 1, 1, 1, 1, 1, 1]; BD=[1.4, 1.45, 1.5, 1.5, 1.5, 1.5, 1.5, 1.5, 1.5]; SubProfileConductance=20; WaterTableDepth=10; CalculateInfiltration=true; CalculateDrainage=true; ReportDetail=false; IncludeSorption=true; CalculateEvaporation=true; CalculateDiffusion=true; DiffusivityMultiplier=1; ExtractionMultiplier=10; ProfileWaterExtraction=0; TotalCover=0; ResidueWater=0; Hour=0; ReportLayer=0; TimeStep=0
            LL15=[0.051, 0.051, 0.052, 0.058, 0.075, 0.085, 0.15, 0.15, 0.15]
          LayerStructure
            Thickness=[50, 50, 50, 50, 50, 50, 50, 50, 50, 50, 50, 50, 50, 50, 50, 50, 50, 50, 50, 50, 50, 50, 50, 50, 50, 50, 50, 50, 50, 50]
          MRSpline
          Evapotranspiration
          Chemical
            Thickness  PH   EC
            100        4.9  0.04
            100        4.2  0.02
            100        4.2  0.02
            100        4.4  0.01
            200        4.4  0.01
            200        4.5  0.01
            200        4.7  0.03
            200        5    0.03
            300        5    0.03
            EC source: Measured (layer 1, 2, 3, 4, 5, 6, 7)
            PH source: Measured, Estimated based on local knowledge
          SoilNitrogen: fom_types=[default, manure, mucuna, lablab, shemp, stable]; fract_carb=[0.2, 0.3, 0.54, 0.57, 0.45, 0]; fract_cell=[0.7, 0.3, 0.37, 0.37, 0.47, 0.1]; fract_lign=[0.1, 0.4, 0.09, 0.06, 0.08, 0.9]; NPartitionApproach=0
            SoilNitrogenNO3 NO3
            SoilNitrogenNH4 NH4
            SoilNitrogenUrea Urea
            SoilNitrogenPlantAvailableNO3 PlantAvailableNO3
            SoilNitrogenPlantAvailableNH4 PlantAvailableNH4
          Organic: FOMCNRatio=40
            Thickness  Carbon  SoilCNRatio  FBiom  FInert  FOM
            100        1.183   14.5         0.04   0.1     250.674
            100        0.559   14.5         0.03   0.3     205.234
            100        0.26    14.5         0.02   0.8     168.032
            100        0.13    14.5         0.01   0.9     137.573
            200        0.13    14.5         0.01   1       92.2177
            200        0.13    14.5         0.01   1       61.8154
            200        0.13    14.5         0.01   1       41.4361
            200        0.13    14.5         0.01   1       27.7754
            300        0.13    14.5         0.01   1       15.2435
          Sample Initial water: Thickness=[100, 100, 100, 100, 200, 200, 200, 200, 300]; SW=[0.37, 0.33, 0.32, 0.3, 0.28, 0.2, 0.15, 0.15, 0.15]; SWUnits=Volumetric; OCUnits=Total; PHUnits=Water
          CERESSoilTemperature Temperature
          OutputLayers: Thickness=[100, 100, 100, 100, 200, 200, 200, 200, 300]
        Plant Wheat
        MicroClimate: a_interception=0; b_interception=1; c_interception=0; d_interception=0; soil_albedo=0.3; SoilHeatFluxFraction=0.4; MinimumHeightDiffForNewLayer=0; NightInterceptionFraction=0.5; ReferenceHeight=2
        Fertiliser
        SurfaceOrganicMatter: InitialResidueName=wheat_stubble; InitialResidueType=wheat; InitialResidueMass=500; InitialStandingFraction=0; InitialCPR=0; InitialCNR=100
        Manager SowingFertiliser
          Amount = 160
          CropName = wheat
```csharp
using Models.PMF;
using Models.Core;
using System;
namespace Models
{
    [Serializable]
    public class Script : Model
    {
        [Link] Clock Clock;
        [Link] Fertiliser Fertiliser;
        [Link] Summary Summary;
        
        
        [Description("Amount of fertiliser to be applied (kg/ha)")]
        public double Amount { get; set;}
        
        [Description("Crop to be fertilised")]
        public string CropName { get; set;}
        
        
        

        [EventSubscribe("Sowing")]
        private void OnSowing(object sender, EventArgs e)
        {
            Model crop = sender as Model;
            if (crop.Name.ToLower()==CropName.ToLower())
                Fertiliser.Apply(Amount: Amount, Type: Fertiliser.Types.NO3N);
        }
        
    }
}
```
        Manager SowingRule
          StartDate = 1-may
          EndDate = 10-jul
          MinESW = 100
          MinRain = 25
          RainDays = 7
          CultivarName = Hartog
          SowingDepth = 30
          RowSpacing = 250
          Population = 120
```csharp
using Models.Interfaces;
using System;
using Models.Core;
using Models.PMF;
using Models.Soils;
using Models.Soils.Nutrients;
using Models.Utilities;
using APSIM.Shared.Utilities;
using Models.Climate;

namespace Models
{
    [Serializable]
    public class Script : Model
    {
        [Link] private Clock Clock;
        [Link] private Fertiliser Fertiliser;
        [Link] private Summary Summary;
        [Link(ByName = true)] private Plant Wheat;
        [Link] private Soil Soil;
        private Accumulator accumulatedRain;
        [Link]
        private ISoilWater waterBalance;
        
        [Description("Start of sowing window (d-mmm)")]
        public string StartDate { get; set;}
        [Description("End of sowing window (d-mmm)")]
        public string EndDate { get; set;}
        [Description("Minimum extractable soil water for sowing (mm)")]
        public double MinESW { get; set;}
        [Description("Accumulated rainfall required for sowing (mm)")]
        public double MinRain { get; set;}
        [Description("Duration of rainfall accumulation (d)")]
        public int RainDays { get; set;}
        [Description("Cultivar to be sown")]
        [Display(Type=DisplayType.CultivarName, PlantName = "Wheat")]
        public string CultivarName { get; set;}
        [Description("Sowing depth (mm)")]
        public double SowingDepth { get; set;}        
        [Description("Row spacing (mm)")]
        public double RowSpacing { get; set;}    
        [Description("Plant population (/m2)")]
        public double Population { get; set;}    
        
        
        [EventSubscribe("StartOfSimulation")]
        private void OnSimulationCommencing(object sender, EventArgs e)
        {
            accumulatedRain = new Accumulator(this, "[Weather].Rain", RainDays);
        }
        

        [EventSubscribe("DoManagement")]
        private void OnDoManagement(object sender, EventArgs e)
        {
            accumulatedRain.Update();
            
            if (DateUtilities.WithinDates(StartDate,Clock.Today,EndDate) &&
                !Wheat.IsAlive &&
                MathUtilities.Sum(waterBalance.ESW) > MinESW &&
                accumulatedRain.Sum > MinRain)
            {
               Wheat.Sow(population:Population, cultivar:CultivarName, depth:SowingDepth, rowSpacing:RowSpacing);    
            }
        
        }
        
    }
}
```
        Manager Harvest
```csharp
using Models.Soils.Nutrients;
using System;
using Models.Core;
using Models.PMF;
using Models.Soils;
using Models.Soils.Nutrients;
using Models.Utilities;
using APSIM.Shared.Utilities;

namespace Models
{
    [Serializable]
    public class Script : Model
    {
        [Link] Plant Wheat;

        [EventSubscribe("DoManagement")]
        private void OnDoManagement(object sender, EventArgs e)
        {
            if (Wheat.IsReadyForHarvesting)
            {
               Wheat.Harvest();
               Wheat.EndCrop();    
            }
        
        }
        
    }
}
```
        Report ReportCrop: EventNames=[Clock].DoReport
        Report ReportWaterLayers: EventNames=[Clock].DoReport
        Report ReportWaterBalance: EventNames=[Clock].DoReport
        Report ReportAllLayers: EventNames=[Clock].DoReport
          VariableNames:
            [Soil].WEIRDO.SW
            [Clock].Today
